L_1 := 1 m
L_2 := 1 m
L_3 := 1 m
P := [0 m; 2 m; -1 m]
ϕ[.0] := acos(P[0]/sqrt(P[0]^2 + P[1]^2)) = 90 deg
P1 := [sqrt(P[0]^2 + P[1]^2); P[2]] = [2; -1] m
ϕ_2 :=
    L_13 ← sqrt((P1[0] - L_1)^2 + (P1[1] - 0 m)^2)
    return acos((L_13^2 - L_2^2 - L_3^2)/(-2*L_2*L_3))
ϕ_1 :=
    L_03 ← sqrt(P1[0]^2 + P1[1]^2)
    L_13 ← sqrt((P1[0] - L_1)^2 + (P1[1] - 0 m)^2)
    ϕ_03 ← acos((L_03^2 - L_1^2 - L_13^2)/(-2*L_1*L_13))
    ϕ_13 ← acos((L_3^2 - L_2^2 - L_13^2)/(-2*L_2*L_13))
    return 360 deg - ϕ_03 - ϕ_13
ϕ[.0] = 90 deg
ϕ_1 = 180 deg
ϕ_2 = 90 deg
